a := 1
X := [3; 3.2; 3.4; 3.6; 3.8; 4; 4.2]
Y := [4.6; 4.4; 4.2; 4.1; 4; 3.8; 3.7]
b := 1
f(x, a, b) := a/ln(x + 1) + b/x
yy(xx) := linterp(X, Y, xx)
r := 1.0, 1.1 .. 2.5
F(x) := [a/ln(x + 1); b/x]
K := linfit(X, Y, F)
K = [4.71474; 3.57912]
Apr(r) := F(r)*K
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