# исходные векторы
# Вводим вектор функции, чтобы соответствовать. В этом примере  подгоняем эти данные к функции модели y == a*x/(b + x),  где а,b  неизвестны.
f(x, a, b) := a*x/(b + x)
VS := [1; 1]
F(x) := [x; 1/(1 + x)]
VK := genfit(X, Y, VS, F)  # error: Эта переменная не определена.
X := [14.67; 19.14; 7.26; 18.09; 9.09; 17.38; 0.78; 18.72; 3.29; 2.33; 2.36; 11.60; 1463; 13.39; 16.17; 19.94; 4.08]
Y := [7.69; 6.67; 5.35; 11.95; 7.21; 2.07; 3.98; 7.84; 5.12; 8.14; 5.97; 9.63; 0.05; 4.51; 9.92; 10.69; 7.8]
FR(x) := f(x, VK1, VK2)  # error: Эта переменная не определена.
# Вызовем функцию linfit, используя данные и вектор функций F.
VK ≡ [□; □]  # error: Пустой местозаполнитель.
S := linfit(X, Y, F)
S = [0.000519472; 22.7873]
# annotation to a formula above: Fitting data to a logarithmic model.
x := -2, -1.9..20  # error: Не удается распознать этот синтаксис.
# Определяем функцию, которая использует эти вновь найденные значения параметров в логарифмической модели. Кроме того, определяем переменную диапазона, по которой будет отображаться график функции.
f(x) := F(x)*S
z := 0, 1.1 .. 10
# График функции модели с недавно найденными значениями параметров и исходными точками данных показывает хорошее соответствие.
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corr(vectorize(f(X)), Y) = -0.18816  # коэффициент корреляции
P := genfit(X, Y, S, f)  # error: Эту функцию здесь использовать нельзя.
i := 1, 2 .. 19
g(t) := F(t)*S
N := 15000
m_x := 0
σ_x := 1  # Количество испытаний и параметры  нормального распределения, σ_x>0
x := rnorm(N, m_x, σ_x)  # Генерация испытания
L := 6  # кол-во интервалов
# Представление данных для гистограммы с помощью ф-ции histogram
H := histogram(L, x)
xx := H[:, 0]
yy := H[:, 1]
p := yy/(N*(xx[1] - xx[0]))
i := 0 .. last(xx)  # Нормированные высоты столбцов
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X := [14.67; 9.09; 18.72; 2.36; 19.94]
Y := [7.69; 11.95; 2.07; 9.92; 7.80]  # точки
F(x) := [x; 1/(1 + x)]
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S := linfit(X, Y, F)
f(x) := F(x)*S
z := 1, 1.1 .. 2.2
S = [0.262645; 36.6975]
corr(vectorize(f(X)), Y) = 0.198753  # коэффициент корреляции
# номер последнего элемента массива х n := last(X) = 4
# пользовательская функция, которая определяет по МНК  сумму квадратов разностей значений исходной зависимости y и расчетной
s(a, b) := sum((Y[i] - a*X[i]/(X[i] + X[i]^2) - b)^2, i = 0 .. n)
a := 1
b := 1
# минимизируем сумму квадратов разностей значений исходной зависимости (вектор y) и расчетной...
[a; b] := Minimize(s, a, b) = [15.5398; 6.14862]
# [a; b] = [15.5398; 6.14862]  коэффициенты нашей расчетной формулы  F(t) := a*t/(t + t^2) + b
# вспомогательная ранжированная переменная t := 0.9, 1 .. 2.3
# коэффициент корреляции
corr(F(X), Y) = 0.445568
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